FINISH
/CLEAR
/FILNAME, Pedestal, 1               !定义工作文件名
/TITLE, The Analysis of Pedestal
/REPLOT                             !重新显示

!!!!
!!!!  参数变量
!!!!
!常量
PI = ACOS(-1)
Es = 2.06e5         !钢的弹性模量 N/mm2
Gs = 0.79e5         !钢的剪切模量 N/mm2
PRs = Es/(2*Gs) - 1 !钢的泊松比
Sfy = 345           !钢的屈服强度 N/mm2
!参数
len1 = -600     !支座标高(相对于正负零)
len2 = 1000     !折段长度
angle1 = PI/4   !折段角度
d1 = 400        !管外径
t1 = 10         !管壁厚
msize = 20      !网格尺寸
!编号
f_n = 1 !加载点节点编号
s_n = 2 !支座点节点编号
!荷载 N / N*mm
f_x = 0
f_y = 0
f_z = 200 * 1000
m_x = 0
m_y = 0
m_z = 0
!求解
substeps_num = 50

!!!!
!!!!  前处理
!!!!
/PREP7

!定义局部坐标系
LOCAL, 11, CYLIN    !局部坐标系 柱坐标系
LOCAL, 12, CYLIN, , , , , , angle1/PI*180   !局部坐标系 斜柱坐标系
LOCAL, 13, CART, , , , , , angle1/PI*180    !局部坐标系 斜坐标系

!激活整体坐标系
CSYS, 0

!!!几何建模
!关键点 !K, NPT, X, Y, Z
K, 1, 0, 0, 0                       !原点
K, 2, 0, 0, len1                    !支座点
K, 3, 0, 0, d1                      !相贯突出点
K, 4, len2*cos(angle1), 0, len2*sin(angle1)     !折段端点
K, 5, -d1*cos(angle1), 0, -d1*sin(angle1)       !折段相贯突出点

!线 !L, P1, P2
L, 2, 3
L, 4, 5

!圆 !CIRCLE, PCENT, RAD, PAXIS, PZERO
CIRCLE, 2, d1/2, 3
CSYS, 11                    !激活局部坐标系
LSEL, S, LOC, X, d1/2       !选择线
CM, circle1, LINE           !命名
CIRCLE, 4, d1/2, 5
CSYS, 12                    !激活局部坐标系
LSEL, S, LOC, X, d1/2       !选择线
CM, circle2, LINE           !命名
ALLSEL                      !Selects all entities with a single command.

!拖拉成面 !ADRAG, NL1, NL2, NL3, NL4, NL5, NL6, NLP1, NLP2, NLP3, NLP4, NLP5, NLP6
ADRAG, circle1, , , , , , 1 !拖拉形成主管
ADRAG, circle2, , , , , , 2 !拖拉形成主管

!用工作平面切分
CSYS, 0     !激活整体坐标系
WPROTA, , , (angle1/PI*180)/2   !旋转工作平面
ASBW, ALL   !ASBW, NA, SEPO, KEEP

ASEL, S, AREA, , 17, 20     !选择面
CM, cube1, AREA             !命名
ASEL, S, AREA, , 21, 24     !选择面
CM, cube2, AREA             !命名
ALLSEL
ADELE, cube1, , , 1         !删除多余的面
ADELE, cube2, , , 1
APTN, ALL                   !Partitions areas. 分隔运算，边界共享。

!!!网格划分
!定义单元类型
ET, 1, SHELL181 !壳单元
!实常数
R, 1, t1        !壁厚
!材料属性
MATNUM = 1              !材料参考号
MP, EX, MATNUM, Es      !弹性模量
MP, PRXY, MATNUM, PRs   !泊松比
TB, MISO, MATNUM        !非线性材料 !MISO多线性各向同性强化
TBPT, DEFI, Sfy/Es, Sfy !本构 折线
TBPT, DEFI, 0.5, Sfy

NKPT, f_n, 4    !加载主节点 !在关键点处定义节点 !NKPT, NODE, NPT
NKPT, s_n, 2    !支座主节点
LESIZE, circle1, msize*2!线的单元尺寸定义
LESIZE, circle2, msize*2!边界处可划分的粗一点(加速计算)
AATT, MATNUM, 1, 1      !设置面单元属性!AATT, MAT, REAL, TYPE, ESYS, SECN
ESIZE, msize            !网格尺寸
MSHAPE, 0               !网格形状(0:4/6;1:3/4)
MSHKEY, 0               !网格类型(0自由1映射)
AMESH, ALL              !划分网格

!CSYS, 13                !激活局部坐标系
!NSEL, S, LOC, Z, len2
!CM, force_N, NODE       !加载面节点
!CSYS, 0                 !激活整体坐标系
!NSEL, S, LOC, Z, len1
!CM, support_N, NODE     !支座面节点

CSYS, 13                !激活局部坐标系
NSEL, S, LOC, Z, len2
CERIG, f_n, ALL, ALL    !加载刚域 !CERIG, MASTE, SLAVE, Ldof, Ldof2, Ldof3, Ldof4, Ldof5 !主节点, 从节点
CSYS, 0                 !激活整体坐标系
NSEL, S, LOC, Z, len1
CERIG, s_n, ALL, ALL    !支座刚域
ALLSEL                  !Selects all entities with a single command.

!!!加载
!加约束
CSYS, 0                 !激活整体坐标系
D, s_n, ALL             !加约束 !D, Node, Lab, VALUE, VALUE2, NEND, NINC, Lab2, Lab3, Lab4, Lab5, Lab6
!ALLSEL                  !Selects all entities with a single command.
!加荷载
CSYS, 13                !激活局部坐标系
!NSEL, S, LOC, Z, len2
!*GET, Par, Entity, ENTNUM, Item1, IT1NUM, Item2, IT2NUM
!*GET, Nf_num, NODE, 0, COUNT    !Retrieves a value and stores it as a scalar parameter or part of an array parameter.
!F, NODE, Lab, VALUE, VALUE2, NEND, NINC
F, f_n, FX, f_x     !Specifies force loads at nodes.
F, f_n, FY, f_y     !Specifies force loads at nodes.
F, f_n, FZ, f_z     !Specifies force loads at nodes.
F, f_n, MX, m_x     !Specifies force loads at nodes.
F, f_n, MY, m_y     !Specifies force loads at nodes.
F, f_n, MZ, m_z     !Specifies force loads at nodes.
!ALLSEL                  !Selects all entities with a single command.

!!!!
!!!!  求解
!!!!
/SOLU

ANTYPE, STATIC  !求解类型
NLGEOM, ON      !大变形
NSUBST, substeps_num        !Specifies the number of substeps to be taken this load step.
CUTCONTROL, PLSLIMIT, 0.10  !Controls time-step cutback during a nonlinear solution.
OUTRES, ALL, 1  !输出选项（1，所有子步）
AUTOTS, ON      !自动时间步
ARCLEN, ON      !激活弧长法(可算下降段)
!ARCTRM, U, 18, , UY !Controls termination of the solution when the arc-length method is used.
NROPT, FULL     !Specifies the Newton-Raphson options in a static or full transient analysis.
!ERESX, NO       !Specifies extrapolation of integration point results.
SSTIF, ON       !应力刚化
SOLVE
FINISH

!!!!
!!!!  后处理
!!!!
/POST1      !通用后处理

CSYS, 0                 !激活整体坐标系
